C172 recovered geometry in SI units
0.16
0 0 0.0
16.395 1.511 10.98
2.22 0.0 -0.99
0.0

SURFACE
Wing
10 1.0 20 -1.0
YDUPLICATE
0.0
SECTION
1.840 0.0 -2.070 1.626 1.5
NACA
2412
SECTION
1.840 2.941 -1.981 1.626 -1.0
NACA
2412
SECTION
2.128 4.750 -1.926 1.130 -1.5
NACA
2412

SURFACE
Horizontal tail
8 1.0 12 -1.0
YDUPLICATE
0.0
SECTION
5.950 0.0 -1.160 1.390 0.0
NACA
0012
SECTION
6.059 1.730 -1.160 0.770 0.0
NACA
0012

SURFACE
Vertical tail
8 1.0 10 1.0
SECTION
6.180 0.0 -1.290 1.390 0.0
NACA
0009
SECTION
6.960 0.0 -2.650 0.650 0.0
NACA
0009
